*********************Mat_MetaData***************************************
***Name: Deactivated Element
***Source: N/A
***Method: N/A
***Compiled by: N/A
*********************Mat_MetaData***************************************
** MATERIALS
*MATERIAL, NAME=deactivated_element
*Density
**Units in (tonne/mm^3)
0,298.15
0,373.15
0,473.15
0,573.15
0,673.15
0,773.15
0,873.15
0,973.15
0,1073.15
0,1173.15
0,1273.15
*CONDUCTIVITY
** Unit: mW/(mm.K)
0.177,298.15
0.177,373.15
0.177,473.15
0.177,573.15
0.177,673.15
0.177,773.15
0.177,873.15
0.177,973.15
0.177,1073.15
0.177,1173.15
0.177,1273.15
*SPECIFIC HEAT
** Unit: mJ/(tonne.K)
520300000,298.15
520300000,373.15
520300000,473.15
520300000,573.15
520300000,673.15
520300000,773.15
520300000,873.15
520300000,973.15
520300000,1073.15
520300000,1173.15
520300000,1273.15
